# Equilibrium Molecular Dynamics (EMD) for Silicon Thermal Conductivity

# Define variables:

units       metal
variable    T equal 500
variable    V equal vol

# variable    dt equal 0.01	# dt = 0.01 t_u
# variable    p equal 77      # correlation length, 0.0766 ps = 76.6 fs
# variable    s equal 1        # sample interval - sample flux at every timestep
# variable    d equal $p*$s    # dump interval

variable    dt equal 1.0	# dt = 0.01 t_u
variable    p equal 77      # correlation length, 0.0766 ps = 76.6 fs
variable    s equal 1        # sample interval - sample flux at every timestep
variable    d equal $p*$s    # dump interval


# Convert to SI Units:

variable    kB equal 1.3806504e-23    # [J/K] Boltzmann
variable    eV2J equal 1.60218e-19/6.02214e23 #eV to Joules
variable    A2m equal 1.0e-10				# Angstroms to Meters
variable    ps2s equal 1.0e-12				# picoseconds to seconds
variable    convert equal ${kCal2J}*${kCal2J}/${fs2s}/${A2m}


# Problem Setup
dimension 3                      # 3D simulation
boundary p p p                   # Periodic boundary conditions in all directions
atom_style atomic                # Atomic style

# variable lx equal 21.4
# variable ly equal 21.4
# variable lz equal 64.2

# Read the atomic structure from the data file
read_data Silicon_supercell.data

# Define atomic mass of Silicon
mass 1 28.0855

# Interatomic Potential (Modified Tersoff)
# pair_style tersoff/mod
# pair_coeff * * Si.tersoff.mod Si

pair_style sw
pair_coeff * * Si.sw Si


timestep     ${dt}
thermo       $d


# Equilibration & Thermalization
velocity all create $T 123456 mom yes rot yes dist gaussian		# Initialize velocities
fix NVT all nvt temp $T $T 100 									# NVT ensemble for equilibration
run 100000														# Run for system stabilization


# Thermal Conductivity Calculation
unfix NVT
fix NVE all nve                                              # Switch to NVE ensemble

reset_timestep 0
compute myKE all ke/atom
compute myPE all pe/atom
compute myStress all stress/atom NULL virial
compute flux all heat/flux myKE myPE myStress                # Compute heat flux

# Heat Flux Components
variable Jx equal c_flux[1]/vol
variable Jy equal c_flux[2]/vol
variable Jz equal c_flux[3]/vol

# Autocorrelation function for heat flux
fix          JJ all ave/correlate $s $p $d &
             c_flux[1] c_flux[2] c_flux[3] type auto file J0Jt.dat ave running


# if flux is scaled by V in autocorrelation, V should be in numerator
# if flux is not scaled by V, then V should be in denominator
# writing the expression a bit clearer:

variable scale equal (${convert}/(${kB}*$T*$T*$V))*$s*${dt}

variable     k11 equal trap(f_JJ[3])*${scale}
variable     k22 equal trap(f_JJ[4])*${scale}
variable     k33 equal trap(f_JJ[5])*${scale}

thermo_style custom step temp v_Jx v_Jy v_Jz v_k11 v_k22 v_k33
run          500000
variable     k equal (v_k11+v_k22+v_k33)/3.0
variable     ndens equal count(all)/vol
print        "average conductivity: $k[W/mK] @ $T K, ${ndens} /A\^3"
